units metal
dimension 3
boundary p p p
atom_style atomic

lattice fcc 3.615
region box block 0 8 0 8 0 8
create_box 1 box
create_atoms 1 box
replicate 10 2 2

mass 1 63.546

pair_style deepmd ${dp_test}
pair_coeff * *

neighbor 2.0 bin
neigh_modify every 1 delay 0 check yes

velocity all create 300.0 12345 mom yes rot yes dist gaussian
fix 1 all npt temp 300.0 300.0 0.1 iso 0.0 0.0 1.0

timestep 0.001
thermo 100
thermo_style custom step temp pe ke etotal press vol

dump 1 all custom 100 cu.lammpstrj id type x y z

run 100
